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/batch
! ANSYS input file written by Workbench version 2023 R1
! File used for geometry attach: C:\Users\lenna\Desktop\Simulation_in_der_Gerätetechnik\FEM\Etappe 1\FEM1_Ansys_19_files\dp0\SYS-5\DM\SYS-5.scdoc
/title,FEM1_Ansys_19--Spiel (F5)
/COM,/COM,     ANSYSMotion, 2023.1
/com,--- Data in consistent NMM units. See Solving Units in the help system for more information.
/units,MPA
/prep7
! Turn off shape checking because checks already performed inside WB mesher.
! See help system for more information.
SHPP,OFF,,NOWARN
etcon,set             ! allow ANSYS to choose best KEYOP's for 180x elements, resets any applicable keyopt to MAPDL defaults
/com,*********** Nodes for the whole assembly ***********
nblock,3,,1565
(1i9,3e20.9e3)
        1     1.500000000E+01     5.000000000E+00     0.000000000E+00
        2     1.874966775E+01     1.387603328E+00     0.000000000E+00
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-1
/com,*********** Elements for Body 1 "SYS-5\Oberfl_che" ***********
et,1,182
keyo,1,3,3
eblock,19,solid,,1320
(19i9)
        1        1        1        1        0        0        0        0        4        0        1     1423     1201      445        4
        1        1        1        1        0        0        0        0        4        0        2     1422     1214     1201     1423
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-1
/com,*********** Send User Defined Coordinate System(s) ***********
csys,0
toffst,273.15,  ! Temperature offset from absolute zero
/com,*********** Set Reference Temperature ***********
tref,22.
/com,*********** Send Materials ***********
Temperature = 'TEMP' ! Temperature
MP,DENS,1,7.84e-09,	! tonne mm^-3
MP,ALPX,1,1.2e-05,	! C^-1
MP,C,1,434000000,	! mm^2 s^-2 C^-1
MP,KXX,1,60.5,	! tonne mm s^-3 C^-1
MP,RSVX,1,0.00017,	! ohm mm
MP,EX,1,206000,	! tonne s^-2 mm^-1
MP,NUXY,1,0.3,
MP,MURX,1,10000,

/com,*********** Send Sheet Properties ***********
r,1,1.

!************************* Model Summary ********************
!SYS-5\Oberfl_che,	C35,	matid,	1
!************************* End Model Summary ********************
/com,*********** Fixed Supports ***********
CMBLOCK,_FIXEDSU,NODE,       15
(8i10)
        13        14       393       394       395       396       397       398
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cmsel,s,_FIXEDSU
d,all,all
nsel,all
/com,******* Constant Zero Displacement Y *******
CMBLOCK,_DISPZEROUY,NODE,       61
(8i10)
         3         4         9        10       366       367       368       369
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cmsel,s,_DISPZEROUY
d,all,uy,0
nsel,all
/com,*********** Create Bearing Load ***********
et,2,153
keyop,2,3,10        ! get plane stress option and thickness from underlying element
eblock,10,,,58
(15i9)
     1321        2        2        2        0     1408        3
     1322        2        2        2        0     1407     1408
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-1
esel,s,type,,2
keyop,2,7,1                ! Use original area so load is constant in large deformation
esel,all
*set,_nzdir,1424
n,_nzdir,0,0,-1 ! create single out of plane node for plane definition
fini
/com,****************************************************************************
/com,*************************    SOLUTION       ********************************
/com,****************************************************************************
/solu
antype,0                   ! static analysis
_thickRatio=  0     ! Ratio of thick parts in the model
eqsl,sparse,,,,,1
cntr,print,1               ! print out contact info and also make no initial contact an error
dmpoption,emat,no             ! Don't combine emat file for DANSYS
dmpoption,esav,no             ! Don't combine esav file for DANSYS
nldiag,cont,iter           ! print out contact info each equilibrium iteration
rescontrol,,none                 ! Do not keep any restart files
/com,****************************************************
/com,******************* SOLVE FOR LS 1 OF 1 ****************
esel,s,type,,2
sfe,all,4,pres,0,0.0,1.,0.,0.
local,11,0,0,0,0,0.,0.,0.
csys,0
*set,_v1,1.
*set,_v2,0.
*set,_v3,0.
*get,_necurr,elem,,count
_ecurr=0
_total=0
*do,_i,1,_necurr
  _ecurr = ELNEXT(_ecurr)
  _normx = NORMNX(NELEM(_ecurr,1),NELEM(_ecurr,2),_nzdir)
  _normy = NORMNY(NELEM(_ecurr,1),NELEM(_ecurr,2),_nzdir)
  _normmag = sqrt(_normx*_normx + _normy*_normy)
  _normx = _normx/_normmag
  _normy = _normy/_normmag
  _dot = _normx*_v1+_normy*_v2
  *if,_dot,gt,-.00001,then
    esel,u,elem,,_ecurr
  *else
    csys,11
    *get,_indd,elem,_ecurr,lproj,x
    csys,0
    _total=_total+_indd
  *endif
*enddo
*set,_thick,1.
_total=_total*_thick    ! multiple by plane thickness to get area
*get,_necurr,elem,,count
*if,_necurr,eq,0,then
  *msg,error
  NO ELEMENTS ARE SELECTED TO APPLY BEARING LOAD TO. &
  IT IS LIKELY THAT THE BEARING LOAD IS IN THE WRONG DIRECTION
*endif
*set,_mag,143.75
_mag=_mag/_total
sfe,all,4,pres,0,_mag,143.75,0.,0.
nsel,all
esel,all
nsub,1,1,1
time,1.
outres,erase
outres,all,none
outres,nsol,all,
outres,rsol,all
outres,eangl,all
outres,etmp,all
outres,veng,all
outres,strs,all,
outres,epel,all,
outres,eppl,all,
outres,cont,all,
! *********** WB SOLVE COMMAND ***********
! check interactive state
*get,ANSINTER_,active,,int
*if,ANSINTER_,ne,0,then
/eof
*endif
solve
/com *************** Write FE CONNECTORS *********
CEWRITE,file,ce,,INTE
/com,****************************************************
/com,*************** FINISHED SOLVE FOR LS 1 *************
*get,_NSOLTHREADS,active,0,ntfs
*get,_NSOLPROCESSES,active,0,npfs
/post1
fini
